units           lj
dimension       3
boundary        p p p
atom_style      atomic

lattice         fcc 0.8442
region          box block 0 10 0 10 0 10
create_box      1 box
create_atoms    1 box

pair_style      lj/cut 2.5
pair_coeff      1 1 1.0 1.0 2.5
mass            1 1.0

neighbor        0.3 bin
neigh_modify    delay 0 every 1 check yes

velocity        all create 1.44 12345 mom yes rot yes
fix             1 all nve

thermo          100
thermo_style    custom step temp pe ke etotal press vol
dump            1 all custom 100 traj.lammpstrj id type x y z
run             1000
